*Heading
** Job name: LST_beam_mesh0 Model name: beam
** Generated by: Abaqus/CAE 2019
*Preprint, echo=NO, model=NO, history=NO, contact=NO
**
** PARTS
**
*Part, name=cantilever
*Node
      1,           0.,           0.
      2,          50.,           0.
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*Element, type=CPE6
 1,  1,  2, 13, 23, 24, 25
 2, 13, 12,  1, 26, 27, 25
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*Nset, nset=_PickedSet5, internal, generate
  1,  63,   1
*Elset, elset=_PickedSet5, internal, generate
  1,  20,   1
*Nset, nset=left
  1, 12
*Nset, nset=right
 11, 22
** Section: beam
*Solid Section, elset=_PickedSet5, material=titanium
1.,
*End Part
**
**
** ASSEMBLY
**
*Assembly, name=Assembly
**
*Instance, name=cantilever-1, part=cantilever
*End Instance
**
*End Assembly
**
** MATERIALS
**
*Material, name=titanium
*Elastic
115000., 0.34
** ----------------------------------------------------------------
**
** STEP: loading
**
*Step, name=loading, nlgeom=NO
*Static
1., 1., 1e-05, 1.
**
** BOUNDARY CONDITIONS
**
** Name: fixed Type: Displacement/Rotation
*Boundary
cantilever-1.left, 1, 1
cantilever-1.left, 2, 2
**
** LOADS
**
** Name: end_load   Type: Concentrated force
*Cload
cantilever-1.right, 2, -1.
**
** OUTPUT REQUESTS
**
*Restart, write, frequency=0
**
** FIELD OUTPUT: F-Output-1
**
*Output, field, variable=PRESELECT
**
** HISTORY OUTPUT: H-Output-1
**
*Output, history, variable=PRESELECT
*End Step
