*Heading
** Job name: femur_2D_TRI6 Model name: femur_2D_TRI6
** Generated by: Abaqus/CAE 2019
*Preprint, echo=NO, model=NO, history=NO, contact=NO
**
** PARTS
**
*Part, name=FEMUR
*Node
      1,    15.847846,    203.61882
      2,   19.9416027,   201.126999
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*Element, type=CPE6
   1,  198,  202,  199,  774,  773,  772
   2,  202,  200,  199,  776,  775,  773
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*Elset, elset=TRIS, generate
    1,  1339,     1
*Nset, nset=FIXED, generate
  68,  112,    1
*Nset, nset=LOAD
 184,
** Section: Section-1-TRIS
*Solid Section, elset=TRIS, controls=EC-1, material=BONE
1.,
*End Part
**
**
** ASSEMBLY
**
*Assembly, name=Assembly
**
*Instance, name=FEMUR-1, part=FEMUR
*End Instance
**
*End Assembly
**
** ELEMENT CONTROLS
**
*Section Controls, name=EC-1, DISTORTION CONTROL=NO, ELEMENT DELETION=NO, hourglass=STIFFNESS
1., 1., 1.
**
** MATERIALS
**
*Material, name=BONE
*Elastic
20000., 0.35
** ----------------------------------------------------------------
**
** STEP: pure_moment
**
*Step, name=pure_moment, nlgeom=NO
*Static
1., 1., 1e-05, 1.
**
** BOUNDARY CONDITIONS
**
** Name: Disp-BC-1 Type: Displacement/Rotation
*Boundary
FEMUR-1.FIXED, 1, 1
FEMUR-1.FIXED, 2, 2
**
** LOADS
**
** Name: CFORCE-1   Type: Concentrated force
*Cload, op=NEW
FEMUR-1.LOAD, 1, -20.
** Name: CFORCE-2   Type: Concentrated force
*Cload, op=NEW
FEMUR-1.LOAD, 2, -50.
**
** OUTPUT REQUESTS
**
*Restart, write, frequency=0
**
** FIELD OUTPUT: F-Output-1
**
*Output, field, variable=PRESELECT
*Output, history, frequency=0
*End Step
